# Калькулятор сложных процентов для банковсокого вклада
# Этот доумент позволяет рассчитать будущую стоимосмть вклада сучётом капитализации процентов, атакже визуализировать рост накоплений.
# 1. Введите параметры вклада
P := 50000  # Начальная сумма вклада (руб.)
r := 13  # Годовая процентрная ставка (%)
t := 5  # Срок вклада (лет)
n := 365  # Количество капитализаций в год
# 2. Расчёт итоговой суммы
A(P, r, t, n) := P*(1 + r/(100*n))^(n*t)
Итоговая_Сумма := A(P, r, t, n)
Итоговая_Сумма = 95766
Доход := Итоговая_Сумма - P
Доход = 45766
i := 0 .. t
# 3. Динамикка роста вклада
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# 4. Влияние процетной ставки на доход
interest_rate_min := 5
interest_rate_max := 12
j := interest_rate_min, interest_rate_min + 0.5 .. interest_rate_max
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# 5. Сравнение с простыми процентами
A_prost := P*(1 + r*t/100)
Compare := A(P, r, t, n) - A_prost = 13266
